<?xml version="1.0" encoding="UTF-8"?>
<channelml xmlns="http://morphml.org/channelml/schema"
    xmlns:xsi="http://www.w3.org/2001/XMLSchema-instance"
    xmlns:meta="http://morphml.org/metadata/schema"
    xsi:schemaLocation="http://morphml.org/channelml/schema http://www.neuroml.org/NeuroMLValidator/NeuroMLFiles/Schemata/v1.8.1/Level2/ChannelML_v1.8.1.xsd"
    units="Physiological Units">

    <meta:notes>ChannelML file containing a single Channel description</meta:notes>

    <channel_type name="kdrmt">

        <status value="stable">
            <meta:comment>Equations adapted from HH paper for modern convention of external potential being zero</meta:comment>
            <meta:contributor>
                <meta:name>Padraig Gleeson</meta:name>
            </meta:contributor>
        </status>

        <meta:notes>Simple example of K conductance in squid giant axon. Based on channel from Hodgkin and Huxley 1952</meta:notes>

        <meta:authorList>
            <meta:modelTranslator>
                <meta:name>Padraig Gleeson</meta:name>
                <meta:institution>UCL</meta:institution>
                <meta:email>p.gleeson - at - ucl.ac.uk</meta:email>
            </meta:modelTranslator>
        </meta:authorList>

        <meta:neuronDBref>
            <meta:modelName>K channels</meta:modelName>
            <meta:uri>http://senselab.med.yale.edu/senselab/NeuronDB/channelGene2.htm#table3</meta:uri>
        </meta:neuronDBref>

        <parameters>
            <parameter name="zetam" value ="0.055"/>
            <parameter name="vhalfm" value ="-50"/>
            <parameter name="gmm" value ="0.5"/>
            <parameter name="a0m" value ="0.0035"/>
        </parameters>

        <current_voltage_relation cond_law="ohmic" ion="k" default_gmax="36" default_erev="-77.0">

            <q10_settings q10_factor="3" experimental_temp="24"/>

            <gate name="m" instances="4">
                <closed_state id="m0"/>
                <open_state id="m"/>

                <transition name="alpha" from="m0" to="m" expr_form="generic" expr="(exp ( zetam * (v - vhalfm)) )"/>
                <transition name="beta" from="m" to="m0"  expr_form="generic" expr="(exp ( zetam * gmm * (v - vhalfm)) )"/>

                <time_course name="tau" from="m0" to="m" expr_form="generic" expr="beta / ( a0m * (1 + alpha))" />

                <steady_state name="inf" from="m0" to="m" expr_form="generic" expr="1/(1 + exp(- (v-21) /10))" />

            </gate>
        </current_voltage_relation>

    </channel_type>
</channelml>
