<?xml version="1.0" encoding="UTF-8"?>
<channelml xmlns="http://morphml.org/channelml/schema" xmlns:xsi="http://www.w3.org/2001/XMLSchema-instance" xmlns:meta="http://morphml.org/metadata/schema" xsi:schemaLocation="http://morphml.org/channelml/schema  ../../../../../trunk/web/NeuroMLFiles/Schemata/v1.7.3/Level2/ChannelML_v1.7.3.xsd" units="Physiological Units">

    <meta:notes>A channel from Maex, R and De Schutter, E. Synchronization of Golgi and Granule Cell Firing in a
    Detailed Network Model of the Cerebellar Granule Cell Layer</meta:notes>

    <channel_type name="KV_CML">

        <status value="stable">

        </status>

        <meta:notes>v type KC channel</meta:notes>

        <meta:authorList>

          <meta:modelAuthor>
                <meta:name>A. Fontana</meta:name>
                <meta:comment>Cited implementer according to the original .mod file</meta:comment>
            </meta:modelAuthor>

            <meta:modelTranslator>
                <meta:name>Padraig Gleeson</meta:name>
                <meta:institution>UCL</meta:institution>
                <meta:email>p.gleeson - at - ucl.ac.uk</meta:email>
            </meta:modelTranslator>
        </meta:authorList>

         <meta:publication>
            <meta:fullTitle>Solinas S, Forti L, Cesana E, Mapelli J, De Schutter E, D'Angelo E. (2007) Computational reconstruction of pacemaking and intrinsic electroresponsiveness in cerebellar Golgi cells.  Front Cell Neurosci. 2007;1:2.</meta:fullTitle>
            <meta:pubmedRef>http://www.ncbi.nlm.nih.gov/pubmed/18946520</meta:pubmedRef>
        </meta:publication>

        <meta:neuronDBref>
            <meta:modelName>Ca channels</meta:modelName>
            <meta:uri>http://senselab.med.yale.edu/NeuronDB/ChannelGene2.htm#table1</meta:uri>
        </meta:neuronDBref>

        <meta:modelDBref>
            <meta:modelName>Cerebellar Golgi cell (Solinas et al. 2007a, 2007b)</meta:modelName>
            <meta:uri>http://senselab.med.yale.edu/modeldb/ShowModel.asp?model=112685</meta:uri>
        </meta:modelDBref>

        <current_voltage_relation cond_law="ohmic" ion="k" default_gmax="32" default_erev="-85">

            <q10_settings q10_factor="3" experimental_temp="6.3"/>

            <gate name="n" instances="4">

                <closed_state id="n0"/>
                <open_state id="n"/>

                <!--
                Aalpha_n = -0.01 (/ms-mV)
		Kalpha_n = -10 (mV)
		V0alpha_n = -26 (mV)

		Abeta_n = 0.125 (/ms)
		Kbeta_n = -80 (mV)
		V0beta_n = -36 (mV)

		alp_n = tcorr*Aalpha_n*linoid(v-V0alpha_n, Kalpha_n)

		                       FUNCTION linoid(x (mV),y (mV)) (mV) {
				               if (fabs(x/y) < 1e-6) {
				                       linoid = y*(1 - x/y/2)
				               }else{
				                       linoid = x/(exp(x/y) - 1)
        					}

		alp_n = (-Aalpha_n*-Kalpha_n) * ((v-V0alpha_n)/-Kalpha_n) / (exp((1v-V0alpha_n)/-Kalpha_n) - 1)

		alpha =  A * ((v-V1/2)/B)  / (1 - exp(-(v-V1/2)/B))  (exp_linear)

		bet_n = tcorr*Abeta_n*exp((v-V0beta_n)/Kbeta_n)

		beta = A * exp((v-V1/2)/B)   (exponential)

                -->

                <transition name="alpha" from="n0" to="n" expr_form="exp_linear" rate="0.1" scale="10" midpoint="-26"/>

                <transition name="beta" from="n" to="n0" expr_form="exponential" rate="0.125" scale="-80" midpoint="-36"/>

            </gate>

        </current_voltage_relation>

        <impl_prefs>
		    <table_settings max_v="30" min_v="-100" table_divisions="13000"/>
	</impl_prefs>

    </channel_type>
</channelml>
