<?xml version="1.0" encoding="UTF-8"?>
<!--

   $Revision: 151 $
   $LastChangedBy: pgleeson $
   $Date: 2008-10-07 14:13:37 +0100 (Tue, 07 Oct 2008) $
   $HeadURL: https://neuroml.svn.sourceforge.net/svnroot/neuroml/tempModels/neuroConstruct/Ex7_GranuleCell/cellMechanisms/Gran_KA_98/KA_Chan.xml $

-->

<channelml xmlns="http://morphml.org/channelml/schema" xmlns:xsi="http://www.w3.org/2001/XMLSchema-instance" xmlns:meta="http://morphml.org/metadata/schema" xsi:schemaLocation="http://morphml.org/channelml/schema  ../../../../../trunk/web/NeuroMLFiles/Schemata/v1.7.3/Level2/ChannelML_v1.7.3.xsd" units="Physiological Units">

    <meta:notes>A channel from Maex, R and De Schutter, E. Synchronization of Golgi and Granule Cell Firing in a
    Detailed Network Model of the Cerebellar Granule Cell Layer</meta:notes>

    <channel_type name="Kslow_CML">

        <status value="in_progress">

        </status>

        <meta:notes>v type KV channel</meta:notes>

        <meta:authorList>
            <meta:modelTranslator>
                <meta:name>Padraig Gleeson</meta:name>
                <meta:institution>UCL</meta:institution>
                <meta:email>p.gleeson - at - ucl.ac.uk</meta:email>
            </meta:modelTranslator>
        </meta:authorList>

            <!--

        <meta:publication>
           <meta:fullTitle>Maex, R and De Schutter, E.
           Synchronization of Golgi and Granule Cell Firing in a Detailed Network Model of the
           cerebellar Granule Cell Layer. J Neurophysiol, Nov 1998; 80: 2521 - 2537</meta:fullTitle>
           <meta:pubmedRef>http://www.ncbi.nlm.nih.gov/entrez/query.fcgi?cmd=Retrieve&amp;db=PubMed&amp;list_uids=9819260&amp;dopt=Abstract</meta:pubmedRef>
        </meta:publication>

        <meta:neuronDBref>
            <meta:modelName>K channels</meta:modelName>
            <meta:uri>http://senselab.med.yale.edu/senselab/NeuronDB/channelGene2.htm#table3</meta:uri>
        </meta:neuronDBref>

        -->

        <current_voltage_relation cond_law="ohmic" ion="k" default_gmax="1.0" default_erev="-85">

            <q10_settings q10_factor="3" experimental_temp="22" />

            <gate name="n" instances="1">

                <closed_state id="n0"/>
                <open_state id="n"/>

                <!--
                Aalpha_n = 0.0033 (/ms)
		Kalpha_n = 40 (mV)
		V0alpha_n = -30 (mV)

		Abeta_n = 0.0033 (/ms)
		Kbeta_n = -20 (mV)
		V0beta_n = -30 (mV)

                alp_n = Aalpha_n*exp((v-V0alpha_n)/Kalpha_n)
                bet_n = Abeta_n*exp((v-V0beta_n)/Kbeta_n)

		beta = A * exp((v-V1/2)/B)   (exponential)

		V0_ninf = -35 (mV)
	        B_ninf =  6 (mV)
	        n_inf = 1/(1+exp(-(v-V0_ninf)/B_ninf))

	        alpha =  A * ((v-V1/2)/B)  / (1 - exp(-(v-V1/2)/B))  (exp_linear)

                -->

                <transition name="alpha" from="n0" to="n" expr_form="exponential" rate="0.0033" scale="40" midpoint="-30"/>

                <transition name="beta" from="n" to="n0" expr_form="exponential" rate="0.0033" scale="-20" midpoint="-30"/>

                <steady_state name="inf" from="n0" to="n" expr_form="generic" expr="1/(1+exp(-(v+35)/6))"/>

	 </gate>

        </current_voltage_relation>

        <impl_prefs>
		    <table_settings max_v="30" min_v="-100" table_divisions="13000"/>
	</impl_prefs>

    </channel_type>
</channelml>
