<?xml version="1.0" encoding="UTF-8"?>
<channelml xmlns="http://morphml.org/channelml/schema"
       xmlns:xsi="http://www.w3.org/2001/XMLSchema-instance"
       xmlns:meta="http://morphml.org/metadata/schema"
       xsi:schemaLocation="http://morphml.org/channelml/schema  http://www.neuroml.org/NeuroMLValidator/NeuroMLFiles/Schemata/v1.8.1/Level2/ChannelML_v1.8.1.xsd"
       units="Physiological Units">

    <meta:notes>Example of 6 state kinetic scheme K conductance specified in ChannelML.</meta:notes>

    <channel_type name="K_AHP">

        <status value = "in_progress">
            <meta:contributor>
                <meta:name>Padraig Gleeson</meta:name>
            </meta:contributor>
        </status>

        <meta:notes>K conductance with 6 kinetic states. NOTE: currently a mapping is only provided
                    to the NEURON Channel Builder format and PSICS</meta:notes>

        <current_voltage_relation cond_law="ohmic" ion="k" default_gmax="36" default_erev="-77.0">

            <q10_settings q10_factor="3" experimental_temp="23"/>

            <gate name="n" instances="1">

                <closed_state id="c1"/>
                <closed_state id="c2"/>
                <closed_state id="c3"/>
                <closed_state id="c4"/>
                <open_state id="o1" fraction="1"/>

                <transition name="alpha_c1_c2" from="c1" to="c2" expr_form="exp_linear" rate="0.4" scale="10" midpoint="-55"/>
                <transition name="beta_c2_c1" from="c2" to="c1" expr_form="exponential" rate="0.125" scale="-80" midpoint="-65"/>
                <transition name="alpha_c2_c3" from="c2" to="c3" expr_form="exp_linear" rate="0.3" scale="10" midpoint="-55"/>
                <transition name="beta_c3_c2" from="c3" to="c2" expr_form="exponential" rate="0.25" scale="-80" midpoint="-65"/>
                <transition name="alpha_c3_c4" from="c3" to="c4" expr_form="exp_linear" rate="0.2" scale="10" midpoint="-55"/>
                <transition name="beta_c4_c3" from="c4" to="c3" expr_form="exponential" rate="0.375" scale="-80" midpoint="-65"/>
                <transition name="alpha_c4_o1" from="c4" to="o1" expr_form="exp_linear" rate="0.1" scale="10" midpoint="-55"/>
                <transition name="beta_o1_c4" from="o1" to="c4" expr_form="exponential" rate="0.5" scale="-80" midpoint="-65"/>

            </gate>
        </current_voltage_relation>

    </channel_type>

</channelml>
