<?xml version="1.0" encoding="UTF-8"?>
<channelml xmlns="http://morphml.org/channelml/schema"
           xmlns:xsi="http://www.w3.org/2001/XMLSchema-instance"
           xmlns:meta="http://morphml.org/metadata/schema"
           xsi:schemaLocation="http://morphml.org/channelml/schema   ../../../../templates/xmlTemplates/Schemata/v1.6/Level2/ChannelML_v1.6.xsd"
           units="Physiological Units">

    <meta:notes>A channel originally from Maex, R and De Schutter, E. 1998, used in Berends et al 2005</meta:notes>

    <ion name="k" charge="1" default_erev="-77"/>

    <channel_type name="Kdr" density="yes">

        <status value="in_progress">
            <meta:contributor>
                <meta:name>Padraig Gleeson</meta:name>
            </meta:contributor>
        </status>

        <meta:notes>Delayed rectifier K+ current</meta:notes>

        <meta:authorList>
            <meta:modelTranslator>
                <meta:name>Padraig Gleeson</meta:name>
                <meta:institution>UCL</meta:institution>
                <meta:email>p.gleeson - at - ucl.ac.uk</meta:email>
            </meta:modelTranslator>
        </meta:authorList>

        <meta:publication>
           <meta:fullTitle>Maex, R and De Schutter, E.
           Synchronization of Golgi and Granule Cell Firing in a Detailed Network Model of the
           cerebellar Granule Cell Layer. J Neurophysiol, Nov 1998; 80: 2521 - 2537</meta:fullTitle>
           <meta:pubmedRef>http://www.ncbi.nlm.nih.gov/entrez/query.fcgi?cmd=Retrieve&amp;db=PubMed&amp;list_uids=9819260&amp;dopt=Abstract</meta:pubmedRef>
        </meta:publication>

        <meta:publication>
            <meta:fullTitle>Berends, Michiel, Maex, Reinoud, De Schutter, Erik.
            The Effect of NMDA Receptors on Gain Modulation.
            Neural Comp. 2005 17: 2531-2547</meta:fullTitle>
          <meta:pubmedRef>http://www.ncbi.nlm.nih.gov/entrez/query.fcgi?cmd=Retrieve&amp;db=PubMed&amp;list_uids=16212761&amp;dopt=Abstract</meta:pubmedRef>
        </meta:publication>

        <meta:neuronDBref>
            <meta:modelName>K channels</meta:modelName>
            <meta:uri>http://senselab.med.yale.edu/senselab/NeuronDB/channelGene2.htm#table3</meta:uri>
        </meta:neuronDBref>

        <current_voltage_relation>
            <ohmic ion="k">
                <conductance default_gmax="3">
                    <rate_adjustments>
                        <q10_settings fixed_q10="5" experimental_temp="37"/> <!-- Note channel should only be used at 37 deg C!-->
                        <offset value="10"/>
                    </rate_adjustments>
                    <gate power="3">
                        <state name="m" fraction="1"/>
                    </gate>
                    <gate power="1">
                        <state name="h" fraction="1"/>
                    </gate>
                </conductance>
            </ohmic>
        </current_voltage_relation>

        <hh_gate state="m">
            <transition>
                <voltage_gate>
                    <alpha>
                        <generic_equation_hh expr="170 * ((exp (0.073 *(v - (-38)))))"/>
                    </alpha>
                    <beta>
                        <generic_equation_hh expr="170 * ((exp ((-0.018) *(v - (-38)))))"/>
                    </beta>
                </voltage_gate>
            </transition>
        </hh_gate>

        <hh_gate state="h">
            <transition>
                <voltage_gate>
                    <alpha>
                        <generic_equation_hh expr="v &gt; -46 ? 0.76 : 0.7 + 0.065*(exp (-0.080*(v - (-46))))"/>
                    </alpha>
                    <beta>
                        <generic_equation_hh expr="1.1/(1 + (exp (-0.0807 * (v - (-44)))))"/>
                    </beta>
                </voltage_gate>
            </transition>
        </hh_gate>

    </channel_type>
</channelml>
