<?xml version="1.0" encoding="UTF-8"?>
<channelml xmlns="http://morphml.org/channelml/schema"
    xmlns:xsi="http://www.w3.org/2001/XMLSchema-instance"
    xmlns:meta="http://morphml.org/metadata/schema"
    xsi:schemaLocation="http://morphml.org/channelml/schema  http://www.neuroml.org/NeuroMLValidator/NeuroMLFiles/Schemata/v1.8.1/Level2/ChannelML_v1.8.1.xsd"
    units="Physiological Units">

    <meta:notes>A channel originally from a granule cell model developed by Volker Steuber and Chiara Saviane</meta:notes>

    <channel_type name="NaF" density="yes">

        <status value="in_progress">
            <meta:comment>Notes from original mod file:
            MS_model:Based on Maex/DeSchutter (1998) and Gabbiani et al. (1994)
	Q: So V0alpha_m=-39 mV here (etc.), like in Gabbiani, so a shift towards -29
      mV still has to be made (denoted by shift = -10 mV)? Probably yes.
	Q: What means GLOBAL again, with regard to TC, Q10?</meta:comment>
            <meta:contributor>
                <meta:name>Padraig Gleeson</meta:name>
            </meta:contributor>
        </status>

        <meta:notes>Fast inactivating Na+ channel</meta:notes>

        <meta:neuronDBref>
            <meta:modelName>Na channels</meta:modelName>
            <meta:uri>http://senselab.med.yale.edu/senselab/NeuronDB/channelGene2.htm#table2</meta:uri>
        </meta:neuronDBref>

        <parameters>
            <parameter name="shift" value ="10"/> <!-- Will be overwritten when placed on cell-->
        </parameters>

        <current_voltage_relation cond_law="ohmic" ion="na" default_gmax="400" default_erev="87.4">

            <q10_settings fixed_q10="5" experimental_temp="37"/>  <!-- Note channel should only be used at 37 deg C!-->
            <offset value="shift"/>
            <gate name="m" instances="3">

                <closed_state id="m0"/>
                <open_state id="m"/>

                <transition name="alpha" from="m0" to="m" expr_form="exponential" rate="1.5" scale="12.3457" midpoint="-39" />

                <transition name="beta" from="m" to="m0" expr_form="exponential" rate="1.5" scale="-15.1515" midpoint="-39" />

                <time_course name="tau" from="m0" to="m" expr_form="generic" expr="1/(alpha + beta) &lt; 0.05 ? 0.05 : 1/(alpha + beta)" />

            </gate>

            <gate name="h" instances="1">
                <closed_state id="h0"/>
                <open_state id="h"/>

                <transition name="alpha" from="h0" to="h" expr_form="exponential" rate="0.12" scale="-11.236" midpoint="-50" />

                <transition name="beta" from="h" to="h0" expr_form="exponential" rate="0.12" scale="11.236" midpoint="-50" />

                <time_course name="tau" from="h0" to="h" expr_form="generic" expr="1/(alpha + beta) &lt; 0.225 ? 0.225 : 1/(alpha + beta)" />

            </gate>

        </current_voltage_relation>

        <impl_prefs>
            <table_settings max_v="100" min_v="-100" table_divisions="2000"/>
        </impl_prefs>

    </channel_type>
</channelml>
